// COMSOL Multiphysics 6.1.0.282 model "biological_lung_membrane.mph"
// Outline of the model tree

Parameters
  E0 = 1[TPa]
  rho0 = 2.267[g/cm^3]
  nu0 = 0.165
  thic = 0.335[nm]
  R0 = 4.75[um]
  epsilonr0 = 4
  sigma0 = 80[MS/m]
  S0 = 0.1[N/m]
  P0 = 1[MPa]

Coordinate systems
  sys2: Cylindrical "Cylindrical System 2"

Common definitions
  mpf1: ParticipationFactors

Geometry
  geom1 "Geometry 1" (3D, length unit µm)
    wp1: WorkPlane | unite = on
      c1: Circle | r = R0
    fin: Finalize "Form Union"

Materials
  mat1: Common "Material 1" on all boundaries
    def "Basic"
      youngsmodulus = E0
      poissonsratio = nu0
      density = rho0

Physics
  mbrn: StructuralMembrane "Membrane" on all boundaries
    dependent variable u = {u, v, w}
    lemm1: LinearElasticModel "Linear Elastic Material 1" (default)
      iss1: InitialStressandStrain on all boundaries | N0 = {S0, 0, 0, S0}
    to1: ThicknessOffset "Thickness and Offset 1" (default) | d = thic
    free1: Free (default)
    init1: init "Initial Values 1" (default) | coordinateSystem = sys2
    fl1: FaceLoad (disabled) on boundaries 1
      LoadType = FollowerPressure
      FollowerPressure = 0
      FperArea = {0, 0, 1000000}
      coordinateSystem = sys2
    fix2: Fixed "Fixed Constraint 2" on edges 1-4

Mesh
  mesh1 "Mesh 1" (physics-controlled)
    size: MeshSizeDefault | hauto = 3

Studies
  std2 "Study 2"
    eig: Eigenfrequency
      eigunit = MHz
      shift = 1
      conrad = 1
      geometricNonlinearity = on
      disabledphysics = mbrn/fl1
      errestandadap = none
      meshadaptmethod = modify

Solver configurations
  sol3 "Solution 3" (study std2)
    v1: Variables "Dependent Variables 1"
      comp1_mbrn_unn: Field "Normal strain (comp1.mbrn.unn)" | scalemethod = manual; scaleval = 1e-3
      comp1_u: Field "Displacement field (comp1.u)" | scalemethod = manual; scaleval = 1e-2*1.34350288425e-05
    e1: Eigenvalue "Eigenvalue Solver 1" | eigvfunscale = maximum; eigvfunscaleparam = 1.34E-11
      dDef: Direct | errorchk = on

Datasets
  dset1: Solution | solution = sol3

Evaluation groups
  std2EvgFrq: EvaluationGroup "Eigenfrequencies (Study 2)" | data = dset1
    gev1: EvalGlobal "Global Evaluation 1"
      expr = {freq*2*pi, imag(freq)/abs(freq), abs(freq)/imag(freq)/2}
      unit = {rad/s, 1, 1}
      descr = {Angular frequency, Damping ratio, Quality factor}
  std2mpf1: EvaluationGroup "Participation Factors (Study 2)" | data = dset1
    gev1: EvalGlobal "Global Evaluation 1"
      expr = {mpf1.pfLnormX, mpf1.pfLnormY, mpf1.pfLnormZ, mpf1.pfRnormX, mpf1.pfRnormY, mpf1.pfRnormZ, mpf1.mEffLX, mpf1.mEffLY, mpf1.mEffLZ, mpf1.mEffRX, mpf1.mEffRY, mpf1.mEffRZ}
      unit = {1, 1, 1, 1, 1, 1, kg, kg, kg, kg*m^2, kg*m^2, kg*m^2}
      descr = {"Participation factor, normalized, X-translation", "Participation factor, normalized, Y-translation", "Participation factor, normalized, Z-translation", "Participation factor, normalized, X-rotation", "Participation factor, normalized, Y-rotation", "Participation factor, normalized, Z-rotation", "Effective modal mass, X-translation", "Effective modal mass, Y-translation", "Effective modal mass, Z-translation", "Effective modal mass, X-rotation", "Effective modal mass, Y-rotation", "Effective modal mass, Z-rotation"}

Plots
  pg1: PlotGroup3D "Mode Shape (mbrn)" | data = dset1; title = Biological Memberane Surface: Displacement magnitude
    surf1: Surface | expr = mbrn.disp
      def: Deform "Deformation" | expr = {u, v, w}; descr = Displacement field
  pg2: PlotGroup3D "pressure" | data = dset1; title = Biological Memberane Surface: Pressure
    surf1: Surface | data = dset1; expr = mbrn.pm; descr = Pressure
  pg3: PlotGroup3D "deformation" | data = dset1; title = Biological Memberane Surface: Displacement
    surf1: Surface | expr = mbrn.disp
      def1: Deform "Deformation 1" | expr = {u, v, w}